** ValveSpring FEA - Force vs Lift (with self-contact for coil binding)
** Material: VD SiCrNi SC  E=206000.0 MPa  nu=0.3
** Compression ramp 0 -> 20.0 mm  (0.5 mm increments, contact)
**
*INCLUDE, INPUT=ValveSpring_mesh.inp
**
*NSET, NSET=NBOT
1, 2, 3, 9, 11, 12
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*NSET, NSET=NTOP
4, 5, 6, 405, 406, 787
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**
*MATERIAL, NAME=SPRING_STEEL
*ELASTIC
206000.0, 0.3
**
*SOLID SECTION, ELSET=EVOLUMES, MATERIAL=SPRING_STEEL
**
** Self-contact surface: 5544 exterior faces (free faces only)
*SURFACE, NAME=SPRING_SURF, TYPE=ELEMENT
6001, S2
6003, S1
6004, S3
6006, S2
6010, S2
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12403, S2
** Contact pair: same surface on both sides = self-contact
*CONTACT PAIR, INTERACTION=COIL_CONTACT, TYPE=SURFACE TO SURFACE
SPRING_SURF, SPRING_SURF
*SURFACE INTERACTION, NAME=COIL_CONTACT
*SURFACE BEHAVIOR, PRESSURE-OVERCLOSURE=HARD
** Steel-on-steel friction (dry): mu=0.12, stick slope 1e-3 mm
*FRICTION
0.12, 1.E-3
**
*STEP, NLGEOM, INC=500
*STATIC
0.5, 20.0, 0.01, 1.0
**
** Bottom face: fully fixed
*BOUNDARY
NBOT, 1, 3, 0.0
** Top face: X/Y fixed, Z compressed
NTOP, 1, 2, 0.0
NTOP, 3, 3, -20.0
**
*NODE PRINT, NSET=NBOT, TOTALS=YES, FREQUENCY=1
RF
*NODE FILE, FREQUENCY=5
U
*EL FILE, FREQUENCY=5
S
*CONTACT FILE, FREQUENCY=5
CSTRESS, CDISP
**
*END STEP
