** ValveSpring FEA - Preload + Valve Lift (2-step, self-contact)
** Drawing A177 053 05 00  |  Material: VD SiCrNi SC  E=273131.0 MPa  nu=0.3
** Step 1: Assembly preload  0 -> 7.9 mm  (39.471 -> 31.6 mm)  F=249 N
** Step 2: Valve lift  7.9 -> 17.9 mm  (31.6 -> 21.6 mm)  F=621 N
**
*INCLUDE, INPUT=ValveSpring_oval_mesh.inp
**
*NSET, NSET=NBOT
1, 3, 6, 10, 12, 13
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*NSET, NSET=NTOP
4, 5, 7, 8, 9, 2670
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**
*MATERIAL, NAME=SPRING_STEEL
*ELASTIC
273131.0, 0.3
**
*SOLID SECTION, ELSET=EALL, MATERIAL=SPRING_STEEL
**
** Self-contact surface: 66312 exterior faces (free faces only)
*SURFACE, NAME=SPRING_SURF, TYPE=ELEMENT
6, S2
14, S1
15, S2
23, S2
24, S2
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235494, S2
** Contact pair: same surface on both sides = self-contact
*CONTACT PAIR, INTERACTION=COIL_CONTACT, TYPE=SURFACE TO SURFACE
SPRING_SURF, SPRING_SURF
*SURFACE INTERACTION, NAME=COIL_CONTACT
*SURFACE BEHAVIOR, PRESSURE-OVERCLOSURE=EXPONENTIAL
0.1, 0.1
**
** Step 1: Assembly preload  0 -> 7.9 mm  (39.471 mm -> 31.6 mm)
*STEP, NLGEOM=YES, INC=500
*STATIC
0.5, 7.9, 0.001, 0.5
*CONTACT CONTROLS, STABILIZE=0.001
**
** Bottom face: fully fixed
*BOUNDARY
NBOT, 1, 3, 0.0
** Top face: X/Y fixed, Z compressed to preload
NTOP, 1, 2, 0.0
NTOP, 3, 3, -7.9
**
*NODE PRINT, NSET=NBOT, TOTALS=YES, FREQUENCY=5
RF
**
*OUTPUT, FIELD, FREQUENCY=5
*NODE OUTPUT
U, RF
*ELEMENT OUTPUT
S, MISES
*CONTACT OUTPUT
CSTRESS, CDISP
**
*END STEP
**
** Step 2: Valve lift  7.9 -> 17.9 mm  (31.6 mm -> 21.6 mm)
*STEP, NLGEOM=YES, INC=1000
*STATIC
0.5, 10.0, 0.001, 0.5
*CONTACT CONTROLS, STABILIZE=0.001
**
*BOUNDARY, OP=NEW
NBOT, 1, 3, 0.0
NTOP, 1, 2, 0.0
NTOP, 3, 3, -17.9
**
*NODE PRINT, NSET=NBOT, TOTALS=YES, FREQUENCY=5
RF
**
*OUTPUT, FIELD, FREQUENCY=5
*NODE OUTPUT
U, RF
*ELEMENT OUTPUT
S, MISES
*CONTACT OUTPUT
CSTRESS, CDISP
**
*END STEP
